// COMSOL Multiphysics 5.4.0.388 model "nonclassical.mph"
// Outline of the model tree

Parameters
  morder = 0  // Global: Azimuthal order
  norm_wavelength = 197.327 [nm]  // Global: vaccum wavelength at 2*pi eV
  r0 = 5[nm]/norm_wavelength  // Global: Normilizer for Phi
  eps_b = 1  // Material: background permittivity
  eps_Al2O3 = 2.1  // Material: Drude-Loretnz permittivty for Al2O3
  dperp = (0.06+0.015*i)[nm]/norm_wavelength  // Material_NL: particle dperp particle
  dpara = (0.02)[nm]/norm_wavelength  // Material_NL: particle dpara particle
  L_b = 300[nm]/norm_wavelength  // Geom: Background side length
  L_pml = 200[nm]/norm_wavelength  // Geom: PML length
  tgap = 5[nm]/norm_wavelength  // Geom: Gap size
  y_dipole = -(Rpico*AP+1[nm]/norm_wavelength)  // Geom: Position of the emitter
  Rgold = 49.3[nm]/norm_wavelength  // Geom: NP
  tpico = 5[degree]  // Geom: Pico round
  AP = 1.91  // Geom: Pico AP
  Rpico = 1[nm]/norm_wavelength  // Geom: Pico
  round_gold = 5[nm]/norm_wavelength  // Geom: Pico
  dpico = 0[nm]  // Geom: Pico
  L_abs_pml = 0.2  // PML: PML absorption length
  omega_pml = 2  // PML: PML center working length
  lambda = 1239.8/wl  // WL: Normalized k
  wl = 500  // WL: Wavelength
  Hgold = 40[nm]/norm_wavelength
  unitc = hbar_const/e_const/1[V]
  epsiloninf_Au = 4.0883
  omegap_Au_1 = 7.0391e15 [1/s]*unitc
  gamma_Au_1 = 0.0074*omegap_Au_1
  omega0_Au_1 = 0 [rad/s]
  omegap_Au_2 = 1.8977e15[1/s]*unitc
  gamma_Au_2 = 0.526e15[1/s]*unitc
  omega0_Au_2 = 6.468e15[1/s]*unitc

Functions
  an2: Analytic "eps_Au" | funcname = eps_Au; expr = epsiloninf_Au*(1-omegap_Au_1^2/(x^2+i*x*gamma_Au_1-omega0_Au_1^2)-omegap_Au_2^2/(x^2+i*x*gamma_Au_2-omega0_Au_2^2)); complex = on

Variables
  var1 "air+ air attached PML" on selection sel3
    epsilon = eps_b
  var17 "Au+Au attached PML" on selection sel1
    epsilon = eps_Au(lambda)
  var18 "Al2O3+ Al2O3 attached PML" on selection sel2
    epsilon = eps_Al2O3
  var2 "Redefined Material Parameters, Non PML Domains" on domains 2-7, 9
    epsilonxx = epsilon*x
    epsilonyy = epsilon*x
    epsilonzz = epsilon/x
    muxx = 1*x
    muyy = 1*x
    muzz = 1/x
  var4 "Redefined Material Parameters, PML Y Domains" on domains 1, 8
    epsilonxx = epsilon*fpy*x
    epsilonyy = epsilon/fpy*x
    epsilonzz = epsilon*fpy/x
    muxx = fpy*x
    muyy = 1/fpy*x
    muzz = fpy/x
  var5 "Redefined Material Parameters, PML X Domains" on domains 11-13
    epsilonxx = epsilon*fx/(x*fpx)*x
    epsilonyy = epsilon*fx*fpx/x*x
    epsilonzz = epsilon*x*fpx/fx*1/x
    muxx = fx/(x*fpx)*x
    muyy = fx*fpx/x*x
    muzz = x*fpx/fx*1/x
  var6 "Redefined Material Parameters, PML XY Domains" on domains 10, 14
    epsilonxx = epsilon*fpy*fx/(x*fpx)*x
    epsilonyy = epsilon*1/fpy*fx*fpx/x*x
    epsilonzz = epsilon*fpy*x*fpx/fx*1/x
    muxx = fpy*fx/(x*fpx)*x
    muyy = 1/fpy*fx*fpx/x*x
    muzz = fpy*x*fpx/fx*1/x
  var3 "pml absorption"
    fpy = 1+i*(abs(y)-L_b/2)*2/omega_pml*1/(L_pml*L_abs_pml)  // Derivative of PML absorption function, y dir
    fx = (x-L_b/2)*2+L_b/2+i*(x-L_b/2)*1/omega_pml*1/(L_abs_pml)  // PML absorption function, x direction
    fpx = d(fx,x)  // Derivative of PML absorption function, x dir
  var24 "Electromagnetic Fields"
    DEx = epsilonxx*Ex
    DEy = epsilonyy*Ey
    DEz = epsilonzz*Ez
  var25 "surface charge metal 1" on selection sel5
    rhom = if(up(md)==0,down(Ex)*nx+down(Ey)*ny,-up(Ex)*nx-up(Ey)*ny)
  var26 "surface charge dielectric 1" on selection sel5
    rhob1 = if(up(md)==0,up(Ex)*nx+up(Ey)*ny,-down(Ex)*nx-down(Ey)*ny)
  var29 "Phi=0" on selection com1
    Phi = 0
    Phix = 0
    Phiy = 0
  var31 "dielectric domain" on selection uni1
    md = 0
  var30 "metal domain" on selection sel1
    md = 1
  var32 "dpara surface current" on selection sel5
    uEx = if(up(md)==0, up(Ex)+up(Phix)*r0, down(Ex) +down(Phix)*r0)
    uEy = if(up(md)==0, up(Ey)+up(Phiy)*r0, down(Ey) +down(Phiy)*r0)
    uEz = if(up(md)==0, up(Ez)+up(Phi)*i*morder *r0, down(Ez)+down(Phi)*i*morder *r0)
    dEx = if(up(md)==0, down(Ex)+down(Phix)*r0, up(Ex) + up(Phix)*r0)
    dEy = if(up(md)==0, down(Ey)+down(Phiy)*r0, up(Ey) + up(Phiy)*r0)
    dEz = if(up(md)==0, down(Ez)+ down(Phi)*i*morder *r0, up(Ez)+up(Phi)*i*morder*r0)
    u_epsilonxx = if(up(md)==0, up(epsilonxx), down(epsilonxx))
    u_epsilonyy = if(up(md)==0, up(epsilonyy), down(epsilonyy))
    u_epsilonzz = if(up(md)==0, up(epsilonzz), down(epsilonzz))
    d_epsilonxx = if(up(md)==0, down(epsilonxx), up(epsilonxx))
    d_epsilonyy = if(up(md)==0, down(epsilonyy), up(epsilonyy))
    d_epsilonzz = if(up(md)==0, down(epsilonzz), up(epsilonzz))
    Jx = uEx*u_epsilonxx- dEx*d_epsilonxx
    Jy = uEy*u_epsilonyy- dEy*d_epsilonyy
    Jz = uEz*u_epsilonzz- dEz*d_epsilonzz
    pJx = ny*ny*Jx-nx*ny*Jy
    pJy = nx*nx*Jy-nx*ny*Jx
    pJz = Jz
  var33 "Magnetic field"
    x2FExz = x*Ex*i*morder
    xFEyz = Ey*(i*morder)
    x2FEphix = -Ez+Ezx*x
    xFEphiy = Ezy
    FExy = Exy
    FEyx = Eyx
    fac = 1/(i*lambda*c_const*mu0_const)
    xHx = fac*(xFEyz-xFEphiy)
    x2Hy = fac*(x2FEphix-x2FExz)
    Hphi = fac*(FExy-FEyx)

Selections
  sel1: Explicit "Au+ atthaced PML" on domains 1, 2, 4, 5, 10, 11
  sel2: Explicit "Al2O3+atthaced PML 1" on domains 3, 9, 12
  sel3: Explicit "Air+ atthaced PML" on domains 6-8, 13, 14
  sel4: Explicit "Auxiliary region" on domains 3, 6, 9
  com1: Complement "Not aux" | entitydim = 2; input = {sel4}
  sel5: Explicit "surface" on boundaries 6, 12, 18, 20, 21, 23, 42-45
  sel6: Explicit "Dirichlet Boundary Condition Potential" on boundaries 14, 24, 25, 30
  uni1: Union "Dielectric" | entitydim = 2; input = {sel2, sel3}

Geometry
  geom1 "Geometry 1" (2D, length unit m)
    r1: Rectangle "Background+PML"
      pos = {(L_b/2+L_pml)/2, 0}
      base = center
      layername = Layer 1
      layer = L_pml
      layerright = on
      layertop = on
      size = {L_b/2+L_pml, L_b+2*L_pml}
    r3: Rectangle "gap" | pos = {(L_b/2+L_pml)/2, -tgap/2}; base = center; size = {L_b/2+L_pml, tgap}
    pt1: Point "emitter" | p = {0, y_dipole}
    r4: Rectangle "NP_r" | size = {Rgold, Hgold}
    sca2: Scale | input = r4; keep = on; type = anisotropic; anisotropic = {1.2, 1.1}; factor = {1.2, 1.1}
    fil1: Fillet | point = r4(1) points 2, 3; radius = round_gold
    c3: Circle
      pos = {(Rpico+Rpico*sin(tpico)/(1-sin(tpico)))*cos(tpico)+dpico, tgap-Rpico*sin(tpico)/(1-sin(tpico))}
      rot = 90
      r = Rpico*sin(tpico)/(1-sin(tpico))
      angle = 90[degree]-tpico
    r7: Rectangle
      pos = {(Rpico+Rpico*sin(tpico)/(1-sin(tpico)))*cos(tpico)-Rpico*sin(tpico)/(1-sin(tpico))*cos(tpico)/2+dpico, tgap-Rpico*sin(tpico)/2}
      base = center
      size = {Rpico*sin(tpico)/(1-sin(tpico))*cos(tpico), Rpico*sin(tpico)}
    dif1: Difference | input = r7; input2 = c3
    c4: Circle | pos = {dpico, tgap}; rot = 270; r = Rpico; angle = 90
    uni1: Union | input = c4, dif1; intbnd = off; edge = all
    mov2: Move | input = uni1; displx = 0; disply = -tgap
    sca1: Scale | input = mov2; type = anisotropic; anisotropic = {1, AP}; factor = {1, AP}
    r8: Rectangle | pos = {0, -tgap}; size = {tgap*2, tgap}
    r9: Rectangle (disabled)
      pos = {0, 20e-9/norm_wavelength}
      base = center
      size = {160e-9/norm_wavelength, 70e-9/norm_wavelength}
    fin: Finalize "Form Union"
    igv1: IgnoreVertices | input = fin(1) points 12, 13

Physics
  w: WeakFormPDE "Maxwell's equations in plane" on all domains
    dependent variable Et = {Ex, Ey}
    ShapeProperty.shapeFunctionType = shcurl
    wfeq1: WeakFormPDE "Maxwell's equations" (default)
      weak = {test(curlEtz)*curlEtz/muzz+i*morder*test(Ex)*1/muyy*Ezx+i*morder*test(Ey)*1/muxx*Ezy+morder^2*test(Ex)*1/muyy*Ex+morder^2*test(Ey)*1/muxx*Ey-lambda^2*test(Ex)*DEx-lambda^2*test(Ey)*DEy, 0}
    zflx1: ZeroFluxBoundary "Zero Flux 1" (default)
    init1: init "Initial Values 1" (default)
    weak3: WeakContribution "dipole source" on points 4
      integrationOrder = 4
      quadratureFrame = spatial
      weakExpression = lambda^2*test(Ey)*mu0_const/2/pi*(-1)*(c_const)^2
      automaticQuadrature = 1
    weak4: WeakContribution "potential contribution" on selection sel4
      integrationOrder = 4
      quadratureFrame = spatial
      weakExpression = (lambda)^2*(-1)*(Phix*test(DEx)+Phiy*test(DEy))*r0
      automaticQuadrature = 1
    weak5: WeakContribution "dpara Surface Current" on selection sel5
      integrationOrder = 4
      quadratureFrame = spatial
      weakExpression = lambda^2*dpara*(pJx*test(tEx)+pJy*test(tEy))
      automaticQuadrature = 1
  w2: WeakFormPDE "Maxwell's equations out plane" on all domains
    dependent variable Ez
    wfeq1: WeakFormPDE (default)
      weak = test(Ezx)*1/muyy*Ezx+test(Ezy)*1/muxx*Ezy-i*morder*test(Ezx)*1/muyy*Ex-i*morder*test(Ezy)*1/muxx*Ey-lambda^2*test(Ez)*DEz
    zflx1: ZeroFluxBoundary "Zero Flux 1" (default)
    init1: init "Initial Values 1" (default)
    dir1: DirichletBoundary "Dirichlet Boundary Condition 1" on boundaries 1, 3, 5, 7-9, 11, 13, 15 | r = 0
    weak1: WeakContribution "potential contribution" on selection sel4
      integrationOrder = 4
      quadratureFrame = spatial
      weakExpression = (lambda)^2*(-1)*( i*morder*Phi *test(DEz))*r0
      automaticQuadrature = 1
    weak2: WeakContribution "dpara Surface Current" on selection sel5
      integrationOrder = 4
      quadratureFrame = spatial
      weakExpression = lambda^2*dpara*(pJz*test(Ez))
      automaticQuadrature = 1
  w3: WeakFormPDE "Potential" on selection sel4
    dependent variable Phi
    wfeq1: WeakFormPDE (default) | weak = (test(Phix)*Phix+morder^2/x^2* test(Phi)*Phi+ test(Phiy)*Phiy)*2*pi*x
    zflx1: ZeroFluxBoundary "Zero Flux 1" (default)
    init1: init "Initial Values 1" (default)
    weak1: WeakContribution "surface charge contribution" on selection sel5
      integrationOrder = 4
      quadratureFrame = spatial
      weakExpression = test(Phi)*(-Phi-dperp/r0*(rhob1-rhom))*1/(dperp+eps)*2*pi*x
      automaticQuadrature = 1
    dir1: DirichletBoundary "Dirichlet Boundary Condition 1" on selection sel6 | r = 0

Mesh
  mesh1 "Mesh 1"
    size: MeshSizeDefault | hmax = 0.212; hmin = 0.0012; hauto = 4; custom = on
    ftri2: FreeTri "Free Triangular 2" on domains 4-6
      size1: Size on boundaries 18, 21, 22, 25 | hmax = Rgold/20; custom = on
      size3: Size on boundaries 42, 43 | hmax = Rgold/250; custom = on
      size4: Size on domains 6 | hmax = Rgold/10; custom = on
    ftri3: FreeTri "Free Triangular 3" on domains 7
      size1: Size on domains 7 | hmax = Rgold/2; custom = on
    cpe1: CopyEdge | source = boundaries 21, 22, 25; destination = boundaries 20
    map2: Map "Mapped 2" on domains 9
      dis1: Distribution on boundaries 19 | numelem = 3
    ftri4: FreeTri "Free Triangular 4" on domains 2, 3
    map1: Map "Mapped 1" on remaining entities | adjustedgdistr = on
      dis1: Distribution on boundaries 26, 29, 34, 35

Studies
  std1 "Study 1"
    param: Parametric "Parametric Sweep" | pname = wl; plistarr = range(450,5,700)
    stat: Stationary

Solver configurations
  sol1 "Solution 1" (study std1)
    v1: Variables "Dependent Variables 1"
    s1: Stationary "Stationary Solver 1"
      dDef: Direct
      p1: Parametric | pname = wl; plistarr = range(450,5,700); pcontinuationmode = no
      fc1: FullyCoupled

Datasets
  dset1: Solution | solution = sol1

Derived values
  pev1: EvalPoint "Point Evaluation 1" on points 4
    data = dset1
    table = tbl2
    expr = imag(Ey+r0*Phiy)/(norm_wavelength)^3

Tables
  tbl2: Table
    // Point Evaluation 1 (imag(Ey+r0*Phiy)/(norm_wavelength)^3)
    wl | imag(Ey+r0*Phiy)/(norm_wavelength)^3, Point: 4
    450 | 1.79941e+36
    455 | 1.51231e+36
    460 | 1.26704e+36
    465 | 1.08224e+36
    470 | 9.44738e+35
    475 | 8.41723e+35
    480 | 7.64135e+35
    485 | 7.05861e+35
    490 | 6.62807e+35
    495 | 6.32267e+35
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
Plots
  pg1: PlotGroup2D "2D Plot Group 1" | data = dset1
    surf1: Surface | expr = imag(Ey+r0*Phiy)/(norm_wavelength)^3
  pg2: PlotGroup2D "2D Plot Group 2" | data = dset1
    line1: Line | expr = up(md); descr = Evaluate in domain on upside